# Винт-гайка скольжения
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# Исходные данные
F := 24000  # Н - внешняя осевая сила
l_max := 225  # мм - максимальная рабочая длина винта (только для сжатых винтов!!!!!)
# Тип резьбы - Метрическая
# Определить размеры винта, высоту гайки, размеры воротка.
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# ψ_h | γ
ψ_h := 0.54  # - коффициент высоты резьбы
ψ_н := 2  # - коэффициент высоты гайки (принимается равным 1,2...2,5)
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γ := 30  # - угол наклона рабочей стороны профиля резьбы
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# Принимаем :
[P]. := 16  # МПа
# 1. Средний диаметр резьбы из условия износостойкости:
d_2 := sqrt(F/(π*ψ_h*ψ_н*[P].))
d_2 = 21.0261  # мм
# Параметры резьбы выбираем по ГОСТ :
# -  таблица 16:
# наружный диаметр резьбы ............................................
d_в := 24  # мм
# шаг резьбы ........................................................
p := 3  # мм
# средний диаметр резьбы .....................................
d_2 := 22.051  # мм
# внутренний диаметр резьбы гайки .........................
D[1] := 20.752  # мм
# Угол подъема резьбы
ψ := atan(p/(π*d_2))*180/π
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# угол подъёма резьбы .........................................................
ψ = 2.47967
# внутренний диаметр резьбы: ..................................................
d_3 := 20.32  # мм
# - таблица 6
# 2. Высота гайки равна:
H_г := ψ_н*d_2
H_г = 44.102  # мм
# Принимаем по ряду Ra40  высоту гайки
H_г := 45  # мм
# 3. Наружный диаметр гайки:
D_г := 2.0*d_в
D_г = 48  # мм
# ВНИМАНИЕ!!!!
# Если винт растянут, то пункты 4 и 5 пропустить!!!
# 4. Расчетная длина сжатого участка винта:
L_p := l_max + H_г/2
L_p = 247.5  # мм
# 5. Гибкость винта:
ψ_H := H_г/d_2
ψ_H = 2.04072
# Если ψ_H <= 2, гайку считаем шарнирной опорой,μ=1;
# Если ψ_H > 2, гайку считаем заделкой, μ=0,7.
# Радиус инерции
i := d_3/4
μ := 0.7
i = 5.08  # мм
λ_в := μ*L_p/i
λ_в = 34.1043
# 6. Проверка винта по объединенному условию прочности и устойчивости σ_cæ<φ[σ]_сж
σ_сж := 4*F/(π*d_3^2)
σ_сж = 74.0072  # МПа
# Винт изготовлен из стали 40X улучшенной
σ_т := 750  # МПа
# Допускаемые напряжения сжатия при коэффициенте запаса прочности S=2...4
S := 3
[σ]_сж := σ_т/S
[σ]_сж = 250  # МПа
# Коэффициент снижения допускаемых напряжений для стальных сжатых стержней
ϕ := 0.86
ϕ*[σ]_сж = 215  # МПа
# ВЫВОД :
# Рабочие напряжения сжатия меньше допустимых, следовательно прочность и устойчивость винта обеспечивается.
# 7. Момент на торце винта
# Расчетный средний диаметр опорного торца винта
d_ц := 0.5*d_3
# Для передачи винт-гайки скольжения коэффициент трения на торце винта принимается  f_т=0,15...0,2
f_т := 0.17
# Момент трения на торце винта
T_т := F*f_т*d_ц/2
T_т = 20726.4  # Нмм
# 8. Момент сопртивления в резьбе:
# Для передачи винт-гайки скольжения коэффициент трения в резьбе f_р=0,1
f_р := 0.1
ϕ_тр := atan(f_р/cos(γ*π/180))
ϕ_тр = 0.114961
T_p := F*d_2/2*tan(ψ*π/180 + ϕ_тр)
T_p = 42225.1  # Нмм
# 9. Момент завинчивания:
T_зав := T_т + T_p
T_зав = 62951.5  # Нмм
# 10. Длина воротка:
# Принимаем усилие, развиваемое одним рабочим:
F_раб := 100  # Н
# T_зав= F_раб*l_вор
l_вор := T_зав/F_раб
l_вор = 629.515  # мм
# Принимаем
l_вор := 630  # мм
# 11. Диаметр воротка из условия его прочности по изгибу:
# Принимаем, что кратковременно рабочий может приложить максимальную силу F_max=3F_раб
F_max := 3*F_раб
F_max = 300  # Н
# Вороток изготовлен из стали 45 горячекатаной
σ_т := 360  # МПа
# Допускаемые напряжения по изгибу при коэффициенте запаса прочности S=1,5
S := 1.5
[σ]_и := σ_т/S
[σ]_и = 240  # МПа
# Напряжения изгиба в опасном сечении воротка равно:
# σ_И=M_И/W_И=F_max*(l_вор - D_2/2)/(0.1*d_вор^3)
# Из условия
D_2 := 2.5*d_в
D_2 = 60  # мм
# Примем
D_2 := 60  # мм
# Откуда
d_вор := nthroot(10*F_max*(l_вор - D_2/2)/[σ]_и, 3)
d_вор = 19.5743  # мм
# Принимаем по ряду Ra40
d_вор := 20  # мм
