# Тавровые сварные соединения
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# Рис. 1
# Исходные данные
F := 24000  # Н  - внешняя сила, действующая на кронштейн
α := 90*π/180  # - угол наклона силы F к горизонту в град.
a := 24  # мм
# - размеры
# сварного стыка
b := 1.5*a = 36  # мм
# Размеры кронштейна (см. рис.1):
L. := 450  # мм
h := 60  # мм
# В результате переноса внешних сил в Ц.М. стыка, получаем:
F_x := F*round(cos(α), 4)
F_x = 0  # Н
F_y := F*sin(α)
F_y = 24000  # Н
M := F*(L. - h)
M = 9360000  # Нмм
# Задаемся катетом сварного шва. Ограничения на величину катета  сварного шва:
# 0,5S<k<S (S - толщина свариваемых деталей)
S := a = 24  # мм
# Примем катет шва равный
k := 22  # мм
# Геометрические характеристики свароного стыка(1-3)
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# 1. Площадь сечения
b_1 := k
h_1 := b
A_1 := b_1*h_1
A_1 = 792  # мм^2  # - вдоль оси y_c1
b_2 := a
h_2 := k
A_2 := b_2*h_2
A_2 = 528  # мм^2  # - вдоль оси x_c2
A := 2*A_1 + 2*A_2
A = 2640  # мм^2
# 2. Момент инерции сечения
# (используем формулы преобразования моментов инерции при параллельном переносе осей, когда одна из осей является центральной)
# 2.1. Расстояния от центральных осей до координат цента масс прямоугольников
X_c1 := 0.5*(a + k)
X_c1 = 23  # мм
Y_c1 := 0
X_c2 := 0
Y_c2 := 0.5*(b + k)
Y_c2 = 29  # мм
# 2.2. Момент инерции сечения относительно оси Х
I_1xc := b_1*h_1^3/12 + A_1*Y_c1^2
I_1xc = 85536  # мм^4
I_2xc := b_2*h_2^3/12 + A_2*Y_c2^2
I_2xc = 465344  # мм^4
I_x := 2*I_1xc + 2*I_2xc
I_x = 1101760  # мм^4
# 2.3. Момент инерции сечения относительно оси Y
I_1yc := h_1*b_1^3/12 + A_1*X_c1^2
I_1yc = 450912  # мм^4
I_2yc := h_2*b_2^3/12 + A_2*X_c2^2
I_2yc = 25344  # мм^4
I_y := 2*I_1yc + 2*I_2yc
I_y = 952512  # мм^4
I_p := I_x + I_y
I_p = 2054272  # мм^4
# 3. Момент сопротивления сечения
# 3.1. Расстояние от наиболее удаленной точки сечения до нейтральной оси
Y_max := b/2
Y_max = 18  # мм
X_max := a/2
X_max = 12  # мм
# 3.2.Момент соротивления сечения относительно оси Х
W_x := I_x/Y_max
W_x = 61208.9  # мм^4
# 3.3.Момент соротивления сечения относительно оси Y
W_y := I_y/X_max
W_y = 79376  # мм^4
# 4. Напряжения в расчетном сечении шва (в опасной точке A ):
# Материал деталей кронштейна - сталь
# Ст.3
σ_т := 220  # МПа - предел текучести.
# Допускаемые напряжения на растяжение для основного металла [σ]_pможно  принять  [σ]_p= (0,74...0,62)σ_τ
[σ]_p := 0.7*σ_т
[σ]_p = 154  # МПа
# Допускаемые напряжения при сдвиге:
# [τ]=0,65[σ]_p- при автоматической или ручной сварке электродами Э42А и Э50А
# [τ]=0,6[σ]_p- при  ручной сварке электродами обычного качества.
[τ] := 0.65*[σ]_p
[τ] = 100.1  # МПа
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# а) Напряжение от центральной сдвигающей силы F_y равномерно распределенной по сечению:
τ_Fy := F_y/A
τ_Fy = 9.09091  # МПа
# что меньше допускаемой нагрузки при сдвиге
[τ] = 100.1  # МПа
# b) Напряжения от отрывающего момента М пропорциональны расстоянию до нейтральной оси, проходящей через центр масс; максимальные напряжения в наиболее удаленных точках А равны:
σ_Mmax := M*Y_max/I_x
σ_Mmax = 152.919  # МПа
# Эквивалентные напряжения в опасной точке A
σ_э := sqrt(σ_Mmax^2 + 3*τ_Fy^2)
σ_э = 153.727  # МПа
# Допускаемые напряжения
[σ]_p = 154  # МПа
# 5. Заключение о прочности угловых  швов:
# Прочность сварных швов обеспечивается при катете k=22  мм .
