# РАСЧЕТ  РЕЗЬБОВЫХ СОЕДИНЕНИЙ, НАГРУЖЕННЫХ ОТРЫВАЮЩЕЙ, СДВИГАЮЩЕЙ СИЛАМИ
# И  ОПРОКИДЫВАЮЩИМ МОМЕНТОМ
# (НАГРУЗКА КОМБИНИРОВАННАЯ)
# Определить диаметр d винтов (болтов или шпилек), крепящих кронштейн к основанию. Винты установлены в отверстия с зазором.
# Исходные данные:
F := 24000  # Н  - внешняя сила, действующая на кронштейн
α := 0*π/180  # - угол наклона силы F к горизонту в град.
# Размеры основания кронштейна
# прямоугольная форма:
L := 360  # длина основания кронштейна
a := 288  # ширина основания кронштейна
l := 180  # размер выемки в основании (если она есть)
r := 45  # расстояние от ЦМ до оси болтов по оси Х
Z := 4  # количество болтов
# Порядок расчета:
# Переносим внешние силы с Ц.М. стыка (по правилам механики).
# Пример расчетной схемы для прямоугольного стыка с выемкой  показан на рис.1
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# Рис.1
# 1. Определение  внешних сил, действующих на стык
# 1.1. Проекции силы F на оси X и Z (горизинтальную и вертикальную оси):
F_x := F*cos(α)
F_x = 24000  # Н
F_z := F*sin(α)
F_z = 0  # Н
F_N := F_z
F_сдв := F_x
# 1.2. Опрокидывающий момент:
# Из условия:
l_пл := 450  # мм  Длина плеча
M_опр := F_x*l_пл
M_опр = 10800000  # Нмм
# 2. Геометрические характеристики стыка:
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h := a
b := (L - l)/2
# Площадь сечения
A := 2*b*h
# Момент инерции сечения
I_x := 2*(b*h^3/12)
Y_max := h/2
# Координата  Х_с
X_c := 0.5*l + 0.5*b
I_y := 2*(h*b^3/12 + X_c^2*b*h)
X_max := 0.5*l + b
# Момент сопротивления сечения
W_x := I_x/Y_max
W_y := I_y/X_max
I_p := I_x + I_y
I_p = 1338094080  # мм ^4
# 3. Сила затяжки винта  из условия нераскрытия  стыка
# 3.1. Условие нераскрытия стыка:
# s_min = s_зат - s_FN - s_Mопр  (1)
# Ìинимально допустимое напряжение на стыке :
# s_min=0,2...0,5 МПа  - для стыка металл-бетон,
# s_min=1,0...2,0 МПа - для металлических стыков
# Принимаем
σ_min := 2  # МПа
# Коэффициент основной нагрузки:
# c=0,2...0,3 -для металлических стыков,
# c=0,7...0,8 - для стыка металл с бетоном
# Принимаем
χ := 0.3
σ_Fz := F_N*(1 - χ)/A
σ_Fz = 0  # МПа  - напряжение  на стыке от  отрывающей силы
σ_Mопр := M_опр*(1 - χ)*X_max/I_y
σ_Mопр = 1.38889
# МПа  - напряжение на стыке от
# опрокидывающего момента
# Из условия нераскрытия стыка (1) определяем  напряжение на стыке, вызванное силой затяжки:
σ_зат := σ_min + σ_Fz + σ_Mопр
σ_зат = 3.38889  # МПа
# s_зат= F_затZ/A_ст  (2)
# 3.2. Из  уравнения (2)  находим необходимую силу затяжки:
F_зат1 := σ_зат*A/Z
F_зат1 = 43920  # Н
# 4. Сила затяжки из условия несдвигаемости:
# Сила затяжки из условия несдвигаемости:
# F_тр=К_сц^.F_x  или  F_зат ^.f^.Z^.i - F_N(1-c)^.f^.i =К_сц^.F_x  (3)
# Из уравнения (3) определяем силу затяжки:
# Коэффициент запаса по несдвигаемости К_сц= 1,3...1,5
K_сц := 1.5
# Коэффициент трения
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# ПРИМЕМ
# коэффициент трения
f := 0.42
i := 1  # - число рабочих стыков
F_зат2 := (K_сц*F_x + F_N*(1 - χ)*f*i)/(Z*f*i) = 21428.6  # Н
# Силу затяжки принимаем  большую из двух полученных
F_зат := max(F_зат2, F_зат1)
F_зат = 43920  # Н
# 5. Внешняя нагрузка, действующая на винт
# Внешняя нагрузка, действующая на винт (болт, шпильку)
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# Из условия:
l_пл := 450  # мм
B := 0.8*l_пл
A := 0.8*B
c := 0.5*B
b_1 := 0.5*(B - c)
a_1 := 0.8*b_1 = 72  # мм
# Расстояния по оси Y от Ц.М. стыка до оси винтов
y_Б1 := a_1/2
y_Б1 = 36  # мм
y_Бmax := y_Б1
F_вн := F_N/Z + M_опр*y_Бmax/(4*y_Б1^2)
F_вн = 75000  # Н
# Суммарная нагрузка, действующая на винт с учетом его скручивания при затяжке
F_б := 1.3*F_зат + χ*F_вн
F_б = 79596  # Н
# 6. Допускаемые напряжения
# Допускаемые напряжения для расчета болта на растяжение:
# Задайте класс прочности винтов и выберите для него
# минимальное значение предела текучести  (по табл.3) :
# Принимаем класс прочности
σ_T := 320  # МПа
# Коэффициент запаса прочности при
# контролируемой затяжке s_т=1,2...1,5
# Принимаем
s_т := 1.2
# Тогда допускаемые напряжения равны:
[σ]_p := σ_T/s_т
[σ]_p = 266.667  # МПа
# 7. Требуемый  диаметр винта (внутренний диаметр по дну впадины резьбы)
d_3 := sqrt(4*F_б/(π*[σ]_p))
d_3 = 19.4947  # мм
# Выбираем из табл. 6 по найденному d3 винты | .....  Класс прочности 4....
d := 24  # - диаметр резьбы, мм
# Диаметр описанной окружности гайки
D := round(1.6898*d + 0.0133)
D = 41  # мм
# Проверка возможности установки винтов полученного размера в кронштейне.
# Если ограничения не выполняются. Необходимо уменьшить диаметр винтов (т.е. изменить класс прочности или  количество винтов).
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answer := (D/2 ≤ (A - a_1)/2) and (D/2 ≤ (B - b_1)/2)
answer = 1
# Если answer = 1, значит винты с таким диаметром возможно установить в кронштейн
# ВЫВОД :
# Ограничения выполняются, следовательно обеспечивается возможность установки болтов кронштейн.
# 8. Проверка прочности основания стыка (только для бетонного основания)
# В данном случае не нужно
