# Сила прессования для заданной посадки с натягом
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# Исходные данные
d_в := 24  # мм
# в предыдущих шагах
# были вычесленны
D_г := 48  # мм
H_г := 45  # мм
l_ст := H_г = 45  # мм  # длина  ступицы
d := D_г = 48  # мм  # посадочный диаметр вала
d_2 := 2.5*d_в = 60  # мм  # наружный диаметр соединения
d_1 := d_в = 24  # мм  # диаметр отверстия в вале
R_a1 := 0.8  # мкм  # параметры шероховатости
R_a2 := 1.6  # мкм
# 1. Параметры заданной посадки (табл. 1.и.2): | d H7/s6
Es := 25  # - верхнее отклонение отверстия, мкм
ei := 43  # - нижнее отклонение вала, мкм
es := 59  # - верхнее отклонение вала, мкм
# По ГОСТ 25347-82 в системе отверстия:
# Таблица 1
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# Таблица 2
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# 2. Максимальный и минимальный натяги  в соединении:
N_min := ei - Es
N_min = 18  # мкм
N_max := es
N_max = 59  # мкм
# 3. Максимальный расчётный  натяг:
# 3.1. Поправка на обмятие микронеровностей:
# При Ra>1,25 мкм k=5, при Ra <1,25 k=6.
k_1 := 6  # - коэффициент, зависящий от Ra[1]
k_2 := 5  # - коэффициент, зависящий от Ra[2]
U_r := k_1*R_a1 + k_2*R_a1
U_r = 8.8  # мкм
δ_pmax := N_max - U_r
# 4. Коэффициенты жесткости деталей соединения:
E[1] := 2.1*10^5  # МПа
# - модуль упругости первого рода (Юнга)
# материала вала
E[2] := 2.1*10^5  # МПа
# - модуль упругости первого рода (Юнга)
# материала втулки
μ[1] := 0.3  # - коэффициент Пуассона материала вала
μ[2] := 0.3  # - коэффициент Пуассона материала втулки
с[1] := (1 + (d_1/d)^2)/(1 - (d_1/d)^2) - μ[1]  # - коэффициент деформации вала
с[1] = 1.36667
c[2] := (1 + (d/d_2)^2)/(1 - (d/d_2)^2) + μ[2]  # - коэффициент деформации втулки
c[2] = 4.85556
# Формула Лямэ:
P_max := δ_pmax/(d*((с[1]/E[1] + c[2]/E[2])*10^3))
P_max = 35.2969  # МПа
# Таблица 3
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f_max := 0.22  # - коэффициент трения соединения
# 5. Сила прессования:
F_з := π*d*l_ст*P_max*f_max
F_з = 52694.2  # Н
# 6. Максимально допустимый прочностью деталей натяг:
σt[1] := 640
# - предел  текучести  для  вала, изготовленного из
# материала Сталь 40X
σt[2] := 220
# - предел текучести для втулки, изготовленного из
# материала  Сталь 3
Pt[1] := σt[1]/2*(1 - (d_1/d)^2)
Pt[2] := σt[2]/2*(1 - (d/d_2)^2)
Pt[1] = 240  # МПа
Pt[2] = 39.6  # МПа
Ptmin := min(Pt[1], Pt[2])
Ptmin = 39.6  # МПа
[N]_max := Ptmin*δ_pmax/P_max + U_r
[N]_max = 65.12  # мкм
# Максимальный натяг при данной посадке
# d H7/s6
N_max = 59  # мкм
# ВЫВОД :
# Значит | [N].max > N_max > N_min
# То есть обеспечивается необходимый наятг при данной посадке
# и сила затяжки
F_з = 52694.2  # Н
